*Heading
*Part, name=part-1
*Node
1, 0.00732971, -0.00592188, -0.0296838
2, 0.00648149, -0.00649071, -0.0289734
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*Element, type=C3D10
1,  558,  608,  936,  1064, 1159, 1160, 1161, 1162, 1163, 1164
2,  110,  98,  1017,  1071, 1165, 1166, 1167, 1168, 1169, 1170
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*Elset, elset=allElems
1, 2, 3, 4, 5, 6
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
*Solid Section, elset=allElems, material=tissue
,
*End Part
*Assembly, name=assembly-1
*Instance, name=instance-1, part=part-1
*End Instance
*Node
1, 0.00563831, -0.00540278, -0.030362
*Node
2, 0.00762312, 0.00850182, -0.00793157
*Node
3, 0.00435765, -0.0130176, -0.00867639
*Nset, nset=rf-1
1
*Nset, nset=rf-2
2
*Nset, nset=rf-3
3
*Nset, nset=rf-1-nset, instance=instance-1
1, 2, 3, 4, 7, 7431
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*Nset, nset=rf-2-nset, instance=instance-1
256, 7296, 258, 259, 3456, 7067
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*Nset, nset=rf-3-nset, instance=instance-1
2456, 1823, 6698, 4144, 4145, 52
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*Nset, nset=fix, instance=instance-1
761, 1000, 1158
*Surface, type=NODE, name=rf-1-nset_CNS_, internal
rf-1-nset, 1.
*Surface, type=NODE, name=rf-2-nset_CNS_, internal
rf-2-nset, 1.
*Surface, type=NODE, name=rf-3-nset_CNS_, internal
rf-3-nset, 1.
*Coupling, constraint name=rf-1, ref node=rf-1, surface=rf-1-nset_CNS_
*Kinematic
*Coupling, constraint name=rf-2, ref node=rf-2, surface=rf-2-nset_CNS_
*Kinematic
*Coupling, constraint name=rf-3, ref node=rf-3, surface=rf-3-nset_CNS_
*Kinematic
*End Assembly
*Material, name=tissue
*Elastic
10000000, 0.3
*Boundary
fix, 1, 1
fix, 2, 2
fix, 3, 3
fix, 4, 4
fix, 5, 5
fix, 6, 6
*Step, name=step-1, nlgeom=YES, inc=5000
*Static
0.001, 1.0, 1e-20, 1.0
*Cload, op=NEW
rf-1, 1, -6.683888748967391
rf-1, 2, 8.454211645352052
rf-1, 3, -7.448548610348922
*Cload, op=NEW
rf-2, 1, -12.653976889663483
rf-2, 2, -11.217195088269689
rf-2, 3, -10.6905142164855
*Cload, op=NEW
rf-3, 1, 6.602046447704543
rf-3, 2, 11.216960030750476
rf-3, 3, -14.379283286437392
*Restart, write, frequency=0
*Output, field, variable=PRESELECT
*Output, history, variable=PRESELECT
*FILE FORMAT, ASCII
*node file, frequency=5000
U, COORD
*El file, frequency=5000
S, COORD
*End Step
